Redirect loadshapes.dss

! 8 PVSystems em barras com carga (8 barras = 24% das barras do sistema)
! Dimensionamento: soma das cargas de pico = 2457 kW -> 8 x pmpp 307,125 kW
! Total instalado = 2457 kW, atendendo a demanda total no pico

New PVSystem.PV_1 phases=3 bus1=728.1.2.3 kv=4.8 conn=delta irrad=1.0 pmpp=307.125 kva=340 temperature=25 pf=1 %cutin=0.05 %cutout=0.05 effcurve=Effic P-tcurve=PvsT Daily=Irrad Tdaily=Temp
New PVSystem.PV_2 phases=3 bus1=733.1.2.3 kv=4.8 conn=delta irrad=1.0 pmpp=307.125 kva=340 temperature=25 pf=1 %cutin=0.05 %cutout=0.05 effcurve=Effic P-tcurve=PvsT Daily=Irrad Tdaily=Temp
New PVSystem.PV_3 phases=3 bus1=737.1.2.3 kv=4.8 conn=delta irrad=1.0 pmpp=307.125 kva=340 temperature=25 pf=1 %cutin=0.05 %cutout=0.05 effcurve=Effic P-tcurve=PvsT Daily=Irrad Tdaily=Temp
New PVSystem.PV_4 phases=3 bus1=740.1.2.3 kv=4.8 conn=delta irrad=1.0 pmpp=307.125 kva=340 temperature=25 pf=1 %cutin=0.05 %cutout=0.05 effcurve=Effic P-tcurve=PvsT Daily=Irrad Tdaily=Temp
New PVSystem.PV_5 phases=3 bus1=718.1.2.3 kv=4.8 conn=delta irrad=1.0 pmpp=307.125 kva=340 temperature=25 pf=1 %cutin=0.05 %cutout=0.05 effcurve=Effic P-tcurve=PvsT Daily=Irrad Tdaily=Temp
New PVSystem.PV_6 phases=3 bus1=720.1.2.3 kv=4.8 conn=delta irrad=1.0 pmpp=307.125 kva=340 temperature=25 pf=1 %cutin=0.05 %cutout=0.05 effcurve=Effic P-tcurve=PvsT Daily=Irrad Tdaily=Temp
New PVSystem.PV_7 phases=3 bus1=722.1.2.3 kv=4.8 conn=delta irrad=1.0 pmpp=307.125 kva=340 temperature=25 pf=1 %cutin=0.05 %cutout=0.05 effcurve=Effic P-tcurve=PvsT Daily=Irrad Tdaily=Temp
New PVSystem.PV_8 phases=3 bus1=742.1.2.3 kv=4.8 conn=delta irrad=1.0 pmpp=307.125 kva=340 temperature=25 pf=1 %cutin=0.05 %cutout=0.05 effcurve=Effic P-tcurve=PvsT Daily=Irrad Tdaily=Temp
